# Minimal valid LAMMPS input script
units metal
dimension 3
boundary p p p
atom_style atomic

lattice fcc 3.615
region box block 0 4 0 4 0 4
create_box 1 box
create_atoms 1 box

pair_style eam/alloy
pair_coeff * * Cu_u3.eam

velocity all create 300.0 87287

timestep 0.001
thermo 100
run 1000
